// SBML level 2 version 4

model BIOMD0000000006()
  // Tyson1991 - Cell Cycle 2 var

  // Compartments:
  compartment cell = 1;  // GO:0005623

  // Species:
  substanceOnly species $EmptySet in cell = 1;
  substanceOnly species $u in cell = 0;  // hasProperty GO:0004693; isVersionOf GO:0031387
  substanceOnly species $z in cell = 0;  // hasVersion uniprot:P04551
  substanceOnly species $v in cell = 0;  // hasVersion uniprot:P04551; hasVersion GO:0031387; hasProperty GO:0004693

  // Reactions:
  Reaction1: $v => ; kappa;  // modifiers: z
  Reaction2: $u => $EmptySet; k6*u;
  Reaction3: $z => $u; k4*z*(k4prime/k4 + u^2);
end
